<?xml version="1.0"?>
<?xml-stylesheet type="text/xsl" href="http://jsbsim.sourceforge.net/JSBSim.xsl"?>
<fdm_config name="F-4S" version="2.0" release="ALPHA"
   xmlns:xsi="http://www.w3.org/2001/XMLSchema-instance"
   xsi:noNamespaceSchemaLocation="http://jsbsim.sourceforge.net/JSBSim.xsd">
<!--

       ___i__i_,
       :vnvvnvvvvi,
        IIIIlIllIvvs|
        vvilIllllllIvs|.
        IlIIIlllIlIlllIv=,
        IIliiilllllIlIIIvvi_
        iiiilllllIlIlIIllllIv,
        li|>illlIllIlIlIIIIlIvv,
        IIIi|iIlllIllIlIlIIIIllvs(
        vIIIi|IlIllIlIlIIlIIIIIIIvv>.
        IIIIlilllIlIlIIIlIIIIvIIIIIvv>,
        vIIIlllllIlIIlIIIIIIvlIIIvlIIvvs,
        IIvlIllllIlIlIIIIIIvlIIIIIIIIIIlvs,                                                  _a,________,
        IIlllIlillIlIIlIIIIllllllllllIIIIlIi______________,_________s)YY111vlliiiiiiiiiiviIvIvIvvnvvvvvvvvis(__
        ~~~~^^^~<IIIvvvvvvvvvvvvvvvvvvvvvvvvnvnnnnnnnnnnnnnooooooooovvnvvnvvvvnvnvnvnvnvvvnvvnvnvvvnvvvnvvvvvvvvi_.
          ._%%vvnnnvnvvnvnvnvnvvvvvvvvnvvnvnvnvvvvvvnvvnvnnvnvnvnnnnnvnvnvnnnnvnvnvnvnvnnvnvnvvvvnvvvvvvvvvvvvvvvvvi,
        _aoonvvvvIi|vvnvvnvnvvnvnvnvnnvvnvvnvvnvnnnvnvnvnvvnvnvnvvvvvnvnvnvvvvnvvvvvnvvvvvvnvvnvnvvnvvvvvvvvvvvvvvvvvi,
        {1}+||Ivlliiv|liIIvIvnvvnvvnvvvnvvnvvnvnvvvnvnvvvvvvIIIIlvllillllllllllllIlIlllllllliIIIIvlvIIIvvvvvvvvvvvvvvvvi_
         +|iilIllIIIllllliiivvvvvvnvvnvvnvnvnvnvnnvnvvvvvvvvvvvvnvvnnvnvnvnvnvnvnvnvnvnvnnvnvnvvIIllIIIliilIvvIvvvvvvvvIv=.
         :iiilllIIIlIIIliiiii|iiivvnnnnnvnvnvnvnvvvvvnvnvnnnvnnnvnnvnvnvnvvnvnvnvnvnvvvnvvvvvvvvvvvvvvvvsIiiiiiivvvvvvvvvvs=,
         =liililllIIIi||+|+++|+||||I1nnnnnvnvnvnvnvnnnvnnvnvnvnvnvvvvvnvvvnvvvvvvvvvvvvvvvvvvIvvIIvIvIvIIliliiiivvvnvvvvvvvvIiii__.
         iiililllIIi~||||+|||+|++|+||i{vnvnnnnvnvnnvnvnvvnvvvvvvvvvvvvvIvvIIvIvIIIIIlIIllllllllllIlllIlIliiiiilivvvvvvvvvvvvvvvvvvIiv_,
        _iiiilllIi~`  -~||+|=++|++|++++|vnvnvnvvvvvvvvvvvlIvIIIIlllIllllllllllllIlIlIlIIlIllIlIlIllllllli|liliilIIvIvIvvvvvvvvnvvvvvvvli_
        :iiillIi~        -<||||||||||++=vnvvvvIvIllilililllllllllllllllllllIlllIlllIllIllllIlllllllllllli|liiiilllllllllllIlIvIvvvvvvvvvIi_
        %ilvI%+             ~+iliii|||||vvv>|+||||||||||||iiiililillillilllillililiiilillllllllllllililii|liliiiiiiiiiiiiiiiiiiliilililiIvIi_
        vr"^>'                 -"~%|i||iiIll||+|+|||+||||||||+|||||||||||||||i||i||i|i|i|||||iiiiiiiiii|||liiiiii|i||i||||||i||||||||||||||||=
                                   -|ilIiiiili||||+|||+|+|+|+||+|||||||ii|i||i|i|i|iii||i|i|||+||||+|+||=lliiii|+||+|+|++||||=|==+=========+-
                                    =ivvc+|+|+||||||||||||||||||||+|+||svvvlvlIlIIIIli||+++|+|+<si=|+r-=|li||i||+||+||+||+|++|=|+|+|+|+|=~`
                                    =Ivvi|+||+|+|+||=++|+~-~~111~-~11~ {vvvvvvvvvvvvvvvs__              "'            =`?'11~11~~-~1111
                                    -~` 11~"^11`                       ~~~^~^^^iiiiiiiiii+^`                          ~
-->
 <fileheader>
  <author> Matthew Anderson </author>
  <filecreationdate>2017-10-08</filecreationdate>
  <version>$Revision: 1.20 $</version>
  <description> Models a F-4S. </description>
 </fileheader>

 <metrics>
   <wingarea  unit="FT2">  538.34 </wingarea>
   <wingspan  unit="FT" >   38.41 </wingspan>
   <wing_incidence>          1.00 </wing_incidence>
   <chord     unit="FT" >   14.02 </chord>
   <htailarea unit="FT2">   94.70 </htailarea>
   <htailarm  unit="FT" >   17.70 </htailarm>
   <vtailarea unit="FT2">   67.50 </vtailarea>
   <vtailarm  unit="FT" >    6.38 </vtailarm>
   <location name="AERORP" unit="M">
     <x>   0.80354  </x>
     <y>   0.00 </y>
     <z>   0.37 </z>
   </location>
   <location name="EYEPOINT" unit="IN">
     <x> 138.22 </x>
     <y>   0.00 </y>
     <z>  38.00 </z>
   </location>
   <location name="VRP" unit="IN">
     <x>0</x>
     <y>0</y>
     <z>0</z>
   </location>
 </metrics>

 <mass_balance>

   <!-- Reference: ADA101648, page 19 -->
   <ixx unit="SLUG*FT2">     23850 </ixx>
   <iyy unit="SLUG*FT2">    127400 </iyy>
   <izz unit="SLUG*FT2">    146000 </izz>
   <ixz unit="SLUG*FT2">    2210   </ixz>
   <!-- End Reference -->
   <emptywt unit="LBS" >     30770 </emptywt>
   <location name="CG" unit="IN">
     <x> 20.00 </x>
     <y> 0.00 </y>
     <z> 0.00 </z>
   </location>
   <!-- <pointmass name="Payload">
    <description> -636 LBS + full (7866 LBS) fuel should bring model up to entered max weight</description>
    <weight unit="LBS">   -318.0 </weight>
    <location name="POINTMASS" unit="IN">
      <x>   0.00 </x>
      <y>   0.00 </y>
      <z>   0.00 </z>
    </location>
    </pointmass> -->
 </mass_balance>

 <ground_reactions>

  <contact type="BOGEY" name="NOSE">
   <location unit="M">
     <x>  -4.60491 </x>
     <y>   0.00    </y>
     <z>  -2.19997 </z>
   </location>
   <static_friction>  0.80 </static_friction>
   <dynamic_friction> 0.50 </dynamic_friction>
   <rolling_friction> 0.02 </rolling_friction>
   <spring_coeff unit="LBS/FT">      11400.00 </spring_coeff>
   <damping_coeff unit="LBS/FT/SEC">  5700.00 </damping_coeff>
   <max_steer unit="DEG"> 30.00 </max_steer>
   <brake_group>NONE</brake_group>
   <retractable>1</retractable>
  </contact>

  <contact type="BOGEY" name="LEFT_MAIN">
   <location unit="M">
     <x>  1.36855 </x>
     <y> -2.75707 </y>
     <z> -2.25371 </z>
   </location>
   <static_friction>  0.80 </static_friction>
   <dynamic_friction> 0.50 </dynamic_friction>
   <rolling_friction> 0.02 </rolling_friction>
   <spring_coeff unit="LBS/FT">      38000.00 </spring_coeff>
   <damping_coeff unit="LBS/FT/SEC"> 19000.00 </damping_coeff>
   <max_steer unit="DEG">0</max_steer>
   <brake_group>LEFT</brake_group>
   <retractable>1</retractable>
  </contact>

  <contact type="BOGEY" name="RIGHT_MAIN">
   <location unit="M">
     <x>  1.36855 </x>
     <y>  2.75707 </y>
     <z> -2.25371 </z>
   </location>
   <static_friction>  0.80 </static_friction>
   <dynamic_friction> 0.50 </dynamic_friction>
   <rolling_friction> 0.02 </rolling_friction>
   <spring_coeff unit="LBS/FT">      38000.00 </spring_coeff>
   <damping_coeff unit="LBS/FT/SEC"> 19000.00 </damping_coeff>
   <max_steer unit="DEG">0</max_steer>
   <brake_group>RIGHT</brake_group>
   <retractable>1</retractable>
  </contact>

  <contact type="STRUCTURE" name="LEFT_WING">
    <location unit="M">
     <x> 4.92865 </x>
     <y> -5.85857 </y>
     <z> -0.6969805 </z>
    </location>
    <static_friction>  1.00 </static_friction>
    <dynamic_friction> 1.00 </dynamic_friction>
    <spring_coeff unit="LBS/FT">      38000.00 </spring_coeff>
    <damping_coeff unit="LBS/FT/SEC"> 38000.00 </damping_coeff>
  </contact>

  <contact type="STRUCTURE" name="RIGHT_WING">
    <location unit="IN">
     <x> 4.92865 </x>
     <y>  5.85857 </y>
     <z> -0.6969805 </z>
    </location>
    <static_friction>  1.00 </static_friction>
    <dynamic_friction> 1.00 </dynamic_friction>
    <spring_coeff unit="LBS/FT">      38000.00 </spring_coeff>
    <damping_coeff unit="LBS/FT/SEC"> 38000.00 </damping_coeff>
  </contact>

 </ground_reactions>

 <propulsion>

   <engine file="J79-GE-10">
    <location unit="M">
      <x> 3.98235 </x>
      <y> -0.731923 </y>
      <z> -0.158145 </z>
    </location>
    <orient unit="DEG">
      <pitch> 0.00 </pitch>
      <roll>  0.00 </roll>
      <yaw>   0.00 </yaw>
    </orient>
    <feed>7</feed>
    <thruster file="direct">
     <location unit="M">
       <x> 5.85124 </x>
       <y> -0.621589 </y>
       <z> -0.434733 </z>
     </location>
     <orient unit="DEG">
	<!-- Reference: ADA101648, page 35 -->
       <pitch> 5.75 </pitch>
       <roll>  0.00 </roll>
       <yaw>   0.00 </yaw>
     </orient>
    </thruster>
  </engine>

   <engine file="J79-GE-10">
    <location unit="M">
      <x> 3.98235 </x>
      <y> 0.731923 </y>
      <z> -0.158145 </z>
    </location>
    <orient unit="DEG">
     <pitch>  0.00 </pitch>
      <roll>  0.00 </roll>
      <yaw>   0.00 </yaw>
    </orient>
    <feed>8</feed>
    <thruster file="direct">
     <location unit="M">
       <x> 5.85124 </x>
       <y> 0.621589 </y>
       <z>-0.434733 </z>
     </location>
     <orient unit="DEG">
    <!-- Reference: ADA101648, page 35 -->
       <pitch> 5.75 </pitch>
       <roll>  0.00 </roll>
       <yaw>   0.00 </yaw>
     </orient>
    </thruster>
  </engine>

  <!-- Fuel tank quanities come from the NAVAIR 01-245FDD-1, Change 2 -->

  <!-- Fuel Cell #1 -->
  <tank type="FUEL" n="0">
      <location unit="M">
          <x> -1.20 </x>
          <y>  0.00000 </y>
          <z>  0.37889 </z>
      </location>
      <capacity unit="LBS"> 1571 </capacity>
      <contents unit="LBS"> 1571 </contents>
  </tank>

  <!-- Fuel Cell #2 -->
  <tank type="FUEL" n="1">
      <location unit="M">
       <x> -0.8 </x>
       <y>   0.00 </y>
       <z>  0.7575 </z>
     </location>
     <capacity unit="LBS"> 1503 </capacity>
     <contents unit="LBS"> 1503 </contents>
  </tank>

  <!-- Fuel Cell #3 -->
  <tank type="FUEL" n="2">
      <location unit="M">
       <x> 0.703104 </x>
       <y>   0.00 </y>
       <z> 0.8 </z>
     </location>
     <capacity unit="LBS"> 1115 </capacity>
     <contents unit="LBS"> 1115 </contents>
  </tank>

  <!-- Fuel Cell #4 -->
  <tank type="FUEL" n="3">
      <location unit="M">
          <x> 2.15 </x>
          <y> 0.0000 </y>
          <z> 0.8075 </z>
      </location>
      <capacity unit="LBS"> 1503 </capacity>
      <contents unit="LBS"> 1503 </contents>
  </tank>

  <!-- Fuel Cell #5 -->
  <tank type="FUEL" n="4">
      <location unit="M">
       <x> 2.5 </x>
       <y> 0.00 </y>
       <z> 0.65 </z>
     </location>
     <capacity unit="LBS"> 1367 </capacity>
     <contents unit="LBS"> 1367 </contents>
  </tank>

  <!-- Fuel Cell #6 -->
  <tank type="FUEL" n="5">
      <location unit="M">
       <x> 4.6 </x>
       <y> 0.00 </y>
       <z> 0.65 </z>
     </location>
     <capacity unit="LBS"> 1598 </capacity>
     <contents unit="LBS"> 1598 </contents>
  </tank>

  <tank type="FUEL" n="6">
      <location unit="M">
       <x> 5.4 </x>
       <y> 0.00 </y>
       <z> 0.75 </z>
     </location>
     <capacity unit="LBS"> 646 </capacity>
     <contents unit="LBS"> 646 </contents>
  </tank>

  <!-- Left Wing Fuel Tank -->
  <tank type="FUEL" n="7">
      <location unit="M">
          <x> 0.8 </x>
          <y> -1.8 </y>
          <z> 0.57 </z>
      </location>
      <capacity unit="LBS"> 2142 </capacity>
      <contents unit="LBS"> 2142 </contents>
  </tank>

  <!-- Right Wing Fuel Tank -->
  <tank type="FUEL" n="8">
      <location unit="M">
          <x> 0.8 </x>
          <y> 1.8 </y>
          <z> 0.57 </z>
      </location>
      <capacity unit="LBS"> 2142 </capacity>
      <contents unit="LBS"> 2142 </contents>
  </tank>

 </propulsion>

 <flight_control name="FCS: F-4S">

  <channel name="Pitch">

   <summer name="Pitch Trim Sum">
      <input>fcs/elevator-cmd-norm</input>
      <input>fcs/pitch-trim-cmd-norm</input>
      <clipto>
        <min> -1 </min>
        <max>  1 </max>
      </clipto>
   </summer>

   <aerosurface_scale name="Elevator Control">
      <input>fcs/pitch-trim-sum</input>
      <range>
        <min> -0.366519 </min>
        <max>  0.157079 </max>
      </range>
      <output>fcs/elevator-pos-rad</output>
   </aerosurface_scale>

   <aerosurface_scale name="elevator normalization">
      <input>fcs/elevator-pos-rad</input>
      <domain>
        <min> -0.366519 </min>
        <max>  0.157079 </max>
      </domain>
      <!-- Reference: ADA101648, page 20 -->
      <range>
        <min>  -21 </min>
        <max>  9 </max>
      </range>
      <output>fcs/elevator-pos-norm</output>
   </aerosurface_scale>
  </channel>

  <channel name="Roll">

   <summer name="Roll Trim Sum">
      <input>fcs/aileron-cmd-norm</input>
      <input>fcs/roll-trim-cmd-norm</input>
      <clipto>
        <min> -1 </min>
        <max>  1 </max>
      </clipto>
   </summer>

   <aerosurface_scale name="Left Aileron Control">
      <input>fcs/roll-trim-sum</input>
      <range>
        <min>  0.00 </min>
        <max>  0.35 </max>
      </range>
      <output>fcs/left-aileron-pos-rad</output>
   </aerosurface_scale>

   <aerosurface_scale name="Right Aileron Control">
      <input>-fcs/roll-trim-sum</input>
      <range>
        <min>  0.00 </min>
        <max>  0.35 </max>
      </range>
      <output>fcs/right-aileron-pos-rad</output>
   </aerosurface_scale>

   <aerosurface_scale name="left aileron normalization">
      <input>fcs/left-aileron-pos-rad</input>
      <domain>
        <min>  0.00 </min>
        <max>  0.35 </max>
      </domain>
      <!-- Reference: ADA101648, page 20 -->
      <range>
        <min>  0 </min>
        <max>  30 </max>
      </range>
      <output>fcs/left-aileron-pos-norm</output>
   </aerosurface_scale>

   <aerosurface_scale name="right aileron normalization">
      <input>fcs/right-aileron-pos-rad</input>
      <domain>
        <min>  0.00 </min>
        <max>  0.35 </max>
      </domain>
      <!-- Reference: ADA101648, page 20 -->
      <range>
        <min>   0 </min>
	    <max>   30 </max>
      </range>
      <output>fcs/right-aileron-pos-norm</output>
   </aerosurface_scale>

   <aerosurface_scale name="Left spoiler control">
       <input>fcs/roll-trim-sum</input>
       <range>
           <min> 0 </min>
           <max> 0.750491 </max>
       </range>
       <output>fcs/left-spoiler-pos-rad</output>
   </aerosurface_scale>

   <aerosurface_scale name="Right spoiler control">
       <input>-fcs/roll-trim-sum</input>
       <range>
           <min> 0 </min>
           <max> 0.750491 </max>
       </range>
       <output>fcs/right-spoiler-pos-rad</output>
   </aerosurface_scale>


   <aerosurface_scale name="Left spoiler normalization">
	   <input>fcs/left-spoiler-pos-rad</input>
	   <domain>
		   <min>  0.00 </min>
		   <max>  0.750491 </max>
	   </domain>
	   <!-- Reference: ADA101648, page 20 -->
	   <range>
		   <min>  0  </min>
		   <max>  43 </max>
	   </range>
	   <output>fcs/left-spoiler-pos-norm</output>
   </aerosurface_scale>

   <aerosurface_scale name="Right spoiler normalization">
	   <input>fcs/right-spoiler-pos-rad</input>
	   <domain>
		   <min> 0 </min>
		   <max> 0.750491 </max>
	   </domain>
	   <!-- Reference: ADA101648, page 20 -->
	   <range>
		   <min> 0 </min>
		   <max> 43 </max>
	   </range>
	   <output>fcs/right-spoiler-pos-norm</output>
   </aerosurface_scale>

  </channel>

  <property value="1">fcs/yaw-damper-enable</property>
  <channel name="Yaw">

   <summer name="Rudder Command Sum">
      <input>fcs/rudder-cmd-norm</input>
      <input>fcs/yaw-trim-cmd-norm</input>
      <clipto>
        <min> -1 </min>
        <max>  1 </max>
      </clipto>
   </summer>

   <scheduled_gain name="Yaw Damper Rate">
      <input>velocities/r-aero-rad_sec</input>
      <table>
        <independentVar lookup="row">velocities/ve-kts</independentVar>
         <tableData>
            30     0.00
            60     2.00
         </tableData>
      </table>
      <gain>fcs/yaw-damper-enable</gain>
   </scheduled_gain>

   <summer name="Rudder Sum">
      <input>fcs/rudder-command-sum</input>
      <input>fcs/yaw-damper-rate</input>
      <clipto>
        <min> -1.1 </min>
        <max>  1.1 </max>
      </clipto>
   </summer>

   <aerosurface_scale name="Rudder Control">
      <input>fcs/rudder-sum</input>
      <domain>
        <min> -1.1 </min>
        <max>  1.1 </max>
      </domain>
      <range>
        <min> -0.35 </min>
        <max>  0.35 </max>
      </range>
      <output>fcs/rudder-pos-rad</output>
   </aerosurface_scale>

   <aerosurface_scale name="rudder normalization">
      <input>fcs/rudder-pos-rad</input>
      <domain>
        <min> -0.35 </min>
        <max>  0.35 </max>
      </domain>
      <!-- Reference: ADA101648, page 20-->
      <range>
        <min> -30 </min>
        <max>  30 </max>
      </range>
      <output>fcs/rudder-pos-norm</output>
   </aerosurface_scale>

  </channel>

  <channel name="Flaps">
   <kinematic name="Flaps Control">
     <input>fcs/flap-cmd-norm</input>
     <traverse>
       <setting>
          <position>  0 </position>
          <time>      0 </time>
       </setting>
       <setting>
          <position> 15 </position>
          <time>      4 </time>
       </setting>
       <setting>
          <position> 30 </position>
          <time>      3 </time>
       </setting>
     </traverse>
     <output>fcs/flap-pos-deg</output>
   </kinematic>

   <aerosurface_scale name="flap normalization">
      <input>fcs/flap-pos-deg</input>
      <domain>
        <min>  0 </min>
        <max> 30 </max>
      </domain>
      <range>
        <min> 0 </min>
        <max> 1 </max>
      </range>
      <output>fcs/flap-pos-norm</output>
   </aerosurface_scale>

  </channel>

  <channel name="Landing Gear">
   <kinematic name="Gear Control">
     <input>gear/gear-cmd-norm</input>
     <traverse>
       <setting>
          <position> 0 </position>
          <time>     0 </time>
       </setting>
       <setting>
          <position> 1 </position>
          <time>     5 </time>
       </setting>
     </traverse>
     <output>gear/gear-pos-norm</output>
   </kinematic>

  </channel>

  <channel name="Speedbrake">
   <kinematic name="Speedbrake Control">
     <input>fcs/speedbrake-cmd-norm</input>
     <traverse>
       <setting>
          <position> 0 </position>
          <time>     0 </time>
       </setting>
       <setting>
          <position> 30 </position>
          <time>     3 </time>
       </setting>
     </traverse>
     <output>fcs/speedbrake-pos-norm</output>
   </kinematic>

  </channel>

 </flight_control>

 <aerodynamics>

     <!-- alpha absolute value -->
     <function name="aero/alpha-deg-abs">
         <abs> <p> aero/alpha-deg </p> </abs>
    </function>

    <!-- Lift Tables -->

    <!-- Reference: ADA101648, page 25 for positive AoA including 0-->
    <function name="aero/coefficient/CL/CL_BASIC">
      <description>CL_BASIC</description>
      <product>
          <property>aero/qbar-psf</property>
          <property>metrics/Sw-sqft</property>
          <table>
            <independentVar lookup="row">aero/alpha-deg-abs</independentVar>
            <tableData>
      		    0     0.122
      		    5     0.4146
      		    10    0.6834
      		    15    0.9053
      		    20    0.9396
      		    25    1.010
      		    30    1.067
      		    35    1.049
      		    40    1.024
      		    45    0.969
      		    50    0.927
      		    55    0.872
      		    60    0.798
      		    65    0.677
      		    70    0.546
      		    75    0.418
      		    80    0.289
      		    85    0.157
      		    90    0.025
      		    95   -0.116
      		    100  -0.257
      		    105  -0.402
      		    110  -0.547
            </tableData>
          </table>
      </product>
     </function>

    <function name="aero/coefficient/CL/Lift_flap">
       <description>Delta Lift due to flaps</description>
       <product>
           <property>aero/qbar-psf</property>
           <property>metrics/Sw-sqft</property>
           <property>fcs/flap-pos-deg</property>
           <value> 0.01167 </value>
       </product>
    </function>

    <function name="aero/coefficient/CL/Lift_speedbrake">
       <description>Delta Lift due to speedbrake</description>
       <product>
           <property>aero/qbar-psf</property>
           <property>metrics/Sw-sqft</property>
           <property>fcs/speedbrake-pos-norm</property>
           <value>0</value>
       </product>
    </function>


    <!-- Reference: ADA101648, page 25 -->
    <function name="aero/coefficient/CL/CL_STAB">
       <description>CL_STAB</description>
       <product>
           <property>aero/qbar-psf</property>
           <property>metrics/Sw-sqft</property>
	   <property>fcs/elevator-pos-norm</property>
	   <table>
		   <independentVar lookup="row">aero/alpha-deg-abs</independentVar>
		   <tableData>
    			0     0.00699
    			5     0.00694
    			10    0.00676
    			15    0.00637
    			20    0.00571
    			25    0.00513
    			30    0.00503
    			35    0.00486
    			40    0.00463
    			45    0.00438
    			50    0.00416
    			55    0.00393
    			60    0.00371
    			65    0.00348
    			70    0.00324
    			75    0.00300
    			80    0.00300
    			85    0.00300
    			90    0.00300
    			95    0.00300
    			100   0.00300
    			105   0.00300
    			110   0.00300
		</tableData>
	</table>

       </product>
    </function>


  <!-- Drag tables -->

  <!-- Reference: ADA101648 page 25 -->
    <function name="aero/coefficient/CD/CD_BASIC">
       <description>Basic drag</description>
       <product>
          <property>aero/qbar-psf</property>
          <property>metrics/Sw-sqft</property>
          <table>
            <independentVar lookup="row">aero/alpha-deg-abs</independentVar>
          	    <tableData>
              		0    0.035
              		5    0.066
              		10   0.130
              		15   0.247
              		20   0.382
              		25   0.510
              		30   0.655
              		35   0.786
              		40   0.911
              		45   1.011
              		50   1.128
              		55   1.245
              		60   1.352
              		65   1.405
              		70   1.451
              		75   1.493
              		80   1.523
              		85   1.542
              		90   1.570
              		95   1.585
              		100  1.600
              		105  1.583
              		110  1.567
          		</tableData>
          </table>
       </product>
    </function>

    <function name="aero/coefficient/CD/CD_Stores">
        <description>Drag due to stores constant (delta)</description>
        <product>
          <property>aero/qbar-psf</property>
          <property>metrics/Sw-sqft</property>
          <value>0.0037</value>
        </product>
    </function>

    <function name="aero/coefficient/CD/CDM">
       <description>Drag due to mach</description>
        <product>
          <property>aero/qbar-psf</property>
          <property>metrics/Sw-sqft</property>
          <table>
            <independentVar lookup="row">velocities/mach</independentVar>
            <tableData>
                0.00      0.000
                0.81      0.000
                1.00      0.28
                1.20      0.23
                2.5       0.19
            </tableData>
          </table>
        </product>
    </function>

    <function name="aero/coefficient/CD/CDDF">
       <description>Drag due to flaps</description>
         <product>
           <property>aero/qbar-psf</property>
           <property>metrics/Sw-sqft</property>
           <property>fcs/flap-pos-deg</property>
           <value> 0.00250 </value>
         </product>
    </function>

    <function name="aero/force/Drag_gear">
       <description>Drag due to gear</description>
         <product>
           <property>aero/qbar-psf</property>
           <property>metrics/Sw-sqft</property>
           <property>gear/gear-pos-norm</property>
           <value>0.02</value>
         </product>
    </function>

    <function name="aero/force/Drag_speedbrake">
       <description>Drag due to speedbrakes</description>
         <product>
           <property>aero/qbar-psf</property>
           <property>metrics/Sw-sqft</property>
           <property>fcs/speedbrake-pos-norm</property>
           <value>0.024</value>
         </product>
    </function>

    <function name="aero/coefficient/CD/CDB">
       <description>Drag due to sideslip</description>
       <product>
          <property>aero/qbar-psf</property>
          <property>metrics/Sw-sqft</property>
          <table>
            <independentVar lookup="row">aero/beta-rad</independentVar>
            <tableData>
              -1.57    1.230
              -0.26    0.050
               0.00    0.000
               0.26    0.050
               1.57    1.230
            </tableData>
          </table>
       </product>
    </function>

    <function name="aero/coefficient/CD/CD_STAB">
       <description>Drag due to Elevator Deflection</description>
       <product>
           <property>aero/qbar-psf</property>
           <property>metrics/Sw-sqft</property>
           <value>0.04</value>
           <abs><property>fcs/elevator-pos-rad</property></abs>
       </product>
    </function>


    <!-- Sideforce Tables -->

  <!-- Reference: ADA101648, page 25-->
    <function name="aero/coefficient/CY/CYB">
       <description>CY_B</description>
       <product>
           <property>aero/qbar-psf</property>
           <property>metrics/Sw-sqft</property>
           <table>
		   <independentVar lookup="row">aero/alpha-deg-abs</independentVar>
                <tableData>
		            0   -0.011
                5   -0.011
                10  -0.011
                15  -0.011
                20  -0.011
                25  -0.011
                30  -0.011
                35  -0.0092
                40  -0.0079
                45  -0.0065
                50  -0.0050
                55  -0.0036
                60  -0.0023
                65  -0.0008
                70   0.0006
                75   0.0020
                80   0.0030
                85   0.0030
                90   0.0030
                95   0.0030
                100  0.0030
                110  0.0030
                </tableData>
           </table>
       </product>
    </function>

    <!-- Reference: ADA101648, page 17 -->
    <function name="aero/coefficient/CY/CYDA">
        <description>Cy due to aileron position, this is a constant</description>
        <product>
            <property>aero/qbar-psf</property>
            <property>metrics/Sw-sqft</property>
            <value>-0.000167</value>
            <property>fcs/left-aileron-pos-norm</property>
        </product>
    </function>

    <!-- Reference: ADA101648, page 17 -->
    <function name="aero/coefficient/CY/CYDSP">
        <description>Cy due to spoiler position</description>
        <product>
            <property>aero/qbar-psf</property>
            <property>metrics/Sw-sqft</property>
            <value>-0.00006</value>
            <property>fcs/left-spoiler-pos-norm</property>
        </product>
    </function>

    <!-- Reference: ADA101648, page 25 -->
    <function name="aero/coefficient/CY/CYDR">
        <description>Cy due to rudder position</description>
        <product>
            <property>aero/qbar-psf</property>
            <property>metrics/Sw-sqft</property>
            <property>fcs/rudder-pos-norm</property>
            <table>
                <independentVar lookup="row">aero/alpha-deg-abs</independentVar>
                <tableData>
                    0   0.00151
                    5   0.00142
                    10  0.00134
                    15  0.00130
                    20  0.00124
                    25  0.00098
                    30  0.00073
                    35  0.00048
                    40  0.00024
                    45  0.00000
                </tableData>
            </table>
        </product>
    </function>


    <!-- Roll Tables -->

     <!-- Reference: ADA101648, page 25 -->
    <function name="aero/coefficient/CR/CRB1">
       <description>Roll moment -- beta #1</description>
       <product>
           <property>aero/qbar-psf</property>
           <property>metrics/Sw-sqft</property>
           <property>metrics/bw-ft</property>
	   <table>
		   <independentVar lookup="row">aero/alpha-deg-abs</independentVar>
           <tableData>
             0   -0.00132
             5   -0.00175
             10  -0.00236
             15  -0.00219
             20  -0.00118
             25  -0.00006
             30  -0.00025
             35  -0.00010
             40  -0.00108
             45  -0.00180
             50  -0.00232
             55  -0.00241
             60  -0.00255
             65  -0.00268
             70  -0.00279
             75  -0.00291
             80  -0.00300
             85  -0.00300
             90  -0.00300
             95  -0.00300
             100 -0.00300
             105 -0.00300
             110 -0.00300
           </tableData>
	   </table>
    </product>
   </function>

    <!-- Reference: ADA101648, page 25 -->
   <function name="aero/coefficient/CR/CRB2">
       <description>Roll moment -- beta #2</description>
       <product>
           <property>aero/qbar-psf</property>
           <property>metrics/Sw-sqft</property>
           <property>metrics/bw-ft</property>
           <table>
               <independentVar lookup="row">aero/alpha-deg-abs</independentVar>
               <tableData>
                   0  -0.00132
                   5  -0.00175
                   10 -0.00236
                   15 -0.00219
                   20 -0.00219
                   25 -0.00219
                   30 -0.00219
                   35 -0.00185
                   40 -0.00152
                   45 -0.00180
                   50 -0.00222
                   55 -0.00241
                   60 -0.00255
                   65 -0.00268
                   70 -0.00279
                   75 -0.00291
                   80 -0.00300
                   85 -0.00300
                   90 -0.00300
                   95 -0.00300
                   100 -0.00300
                   105 -0.00300
                   110 -0.00300
               </tableData>
           </table>
      </product>
  </function>


    <!-- Reference: ADA101648, page 25 -->
    <function name="aero/coefficient/CR/CRP1">
       <description>Roll moment due to roll rate</description>
       <product>
           <property>aero/qbar-psf</property>
           <property>metrics/Sw-sqft</property>
           <property>metrics/bw-ft</property>
           <property>aero/bi2vel</property>
           <property>velocities/p-aero-rad_sec</property>
           <table>
               <independentVar lookup="row">aero/alpha-deg-abs</independentVar>
               <tableData>
                   0   -0.304
                   5   -0.300
                   10  -0.255
                   15  -0.102
                   20  -0.100
                   25  -0.280
                   30  -0.304
                   35  -0.250
                   40  -0.164
                   45  -0.100
               </tableData>
           </table>
       </product>
    </function>

    <!-- Reference: ADA101648, page 25 -->
    <function name="aero/coefficient/CR/CRP2">
        <description>Roll moment due to roll rate #2</description>
        <product>
            <property>aero/qbar-psf</property>
            <property>metrics/Sw-sqft</property>
            <property>metrics/bw-ft</property>
            <property>aero/bi2vel</property>
            <property>velocities/p-aero-rad_sec</property>
            <table>
                <independentVar lookup="row">aero/alpha-deg-abs</independentVar>
                <tableData>
                    0  -0.304
                    5  -0.300
                    10 -0.260
                    15 -0.260
                    20 -0.260
                    25 -0.260
                    30 -0.260
                    35 -0.250
                    40 -0.164
                    45 -0.100
                </tableData>
            </table>
        </product>
    </function>

    <!-- Reference: ADA101648, page 26 -->
    <function name="aero/coefficient/CR/CRR">
       <description>Roll moment due to yaw rate</description>
       <product>
           <property>aero/qbar-psf</property>
           <property>metrics/Sw-sqft</property>
           <property>metrics/bw-ft</property>
           <property>aero/bi2vel</property>
           <property>velocities/r-aero-rad_sec</property>
           <table>
               <independentVar lookup="row">aero/alpha-deg-abs</independentVar>
               <tableData>
                   0   0.046
                   5   0.076
                   10  0.108
                   15  0.170
                   20  0.318
                   25  0.387
                   30  0.341
                   35  0.204
                   40  0.085
                   45  0.050
               </tableData>
           </table>
       </product>
    </function>

<!-- Reference: ADA101648, page 26 -->
    <function name="aero/coefficient/CR/CRDA">
       <description>CRDA (aileron position)</description>
       <product>
          <property>aero/qbar-psf</property>
          <property>metrics/Sw-sqft</property>
	         <property>metrics/bw-ft</property>
	         <property>fcs/left-aileron-pos-norm</property>
		    <table>
			    <independentVar lookup="row">aero/alpha-deg-abs</independentVar>
			    <tableData>
    			    0    0.000448
    			    5    0.000459
    			    10   0.000431
    			    15   0.000405
    			    20   0.000379
    			    25   0.000354
              30   0.000312
              35   0.000210
              40   0.000105
              45   0.000000
            </tableData>
        </table>

    </product>
</function>

    <!-- Reference: ADA101648, page 26 -->
    <function name="aero/coefficient/CR/CRDSP">
	    <description>CRDSP (spoiler position)</description>
	    <product>
		    <property>aero/qbar-psf</property>
		    <property>metrics/Sw-sqft</property>
		    <property>metrics/Sw-sqft</property>
		    <property>fcs/left-spoiler-pos-norm</property>
		    <table>
			    <independentVar lookup="row">aero/alpha-deg-abs</independentVar>
			    <tableData>
  				    0   0.000130
  				    5   0.000140
  				    10  0.000093
  				    15  0.000066
  				    20  0.000054
  				    25  0.000040
  				    30  0.000030
  				    35  0.000020
  				    40  0.000010
  				    45  0.000000
			    </tableData>
		    </table>
	    </product>
    </function>

    <!-- Reference: ADA101648, page 26 -->
    <function name="aero/coefficient/CR/CRDR">
       <description>rudder position</description>
       <product>
           <property>aero/qbar-psf</property>
           <property>metrics/Sw-sqft</property>
           <property>metrics/bw-ft</property>
	   <property>fcs/rudder-pos-norm</property>
	   <table>
		   <independentVar lookup="row">aero/alpha-deg-abs</independentVar>
		   <tableData>
			   0    0.000199
			   5    0.000165
			   10   0.000135
			   15   0.000116
			   20   0.000092
			   25   0.000069
			   30   0.000052
			   35   0.000035
			   40   0.000017
			   45   0.000000
		   </tableData>
	   </table>
       </product>
    </function>


    <!-- Pitch Moments -->

    <!-- Reference: ADA101648, page 26 -->
    <function name="aero/coefficient/CM/CM_BASIC">
       <description>Pitch moment due to alpha</description>
       <product>
           <property>aero/qbar-psf</property>
           <property>metrics/Sw-sqft</property>
           <property>metrics/cbarw-ft</property>
           <property>aero/alpha-deg</property>
           <table>
               <independentVar lookup="row">aero/alpha-deg-abs</independentVar>
               <tableData>
                   0   0.000
                   5   -0.013
                   10  -0.027
                   15  -0.033
                   20  -0.050
                   25  -0.068
                   30  -0.093
                   35  -0.144
                   40  -0.196
                   45  -0.242
                   50  -0.263
                   55  -0.285
                   60  -0.318
                   65  -0.381
                   70  -0.430
                   75  -0.475
                   80  -0.501
                   85  -0.532
                   90  -0.571
                   95  -0.616
                   100 -0.658
                   105 -0.695
                   110 -0.729
               </tableData>
           </table>
       </product>
    </function>

    <!-- Reference: ADA101648, page 27 -->
    <function name="aero/coefficient/CM/CM_STAB">
       <description>Pitch moment due to elevator</description>
       <sum>
       <product>
          <property>aero/qbar-psf</property>
          <property>metrics/Sw-sqft</property>
          <property>metrics/cbarw-ft</property>
          <property>fcs/elevator-pos-deg</property>
          <table>
            <independentVar lookup="row">aero/alpha-deg</independentVar>
            <tableData>
                0   -0.01010
                5   -0.01004
                10  -0.00981
                15  -0.00926
                20  -0.00828
                25  -0.00745
                30  -0.00733
                35  -0.00677
                40  -0.00627
                45  -0.00572
                50  -0.00519
                55  -0.00466
                60  -0.00414
                65  -0.00361
                70  -0.00308
                75  -0.00256
                80  -0.00202
                85  -0.00150
                90  -0.00099
                95  -0.00052
                100  0.00000
                105  0.00000
                110  0.00000
            </tableData>
          </table>
       </product>
       <v> 0.00011 </v>
     </sum>
    </function>

    <!-- Reference: ADA101648, page 27 -->
    <function name="aero/coefficient/CM/CMQ">
       <description>Pitch moment due to pitch rate</description>
       <product>
           <property>aero/qbar-psf</property>
           <property>metrics/Sw-sqft</property>
           <property>metrics/cbarw-ft</property>
           <property>aero/ci2vel</property>
           <property>velocities/q-aero-rad_sec</property>
           <table>
               <independentVar lookup="row">aero/alpha-deg-abs</independentVar>
               <tableData>
                   0   -3.10
                   5   -3.41
                   10  -3.78
                   15  -3.92
                   20  -3.80
                   25  -3.62
                   30  -3.15
                   35  -3.15
                   40  -3.15
                   45  -3.15
               </tableData>
           </table>
       </product>
    </function>

    <!-- Reference: ADA101648, page 27 -->
    <function name="aero/coefficient/CM/CMAD">
       <description>Pitch moment due to alpha rate</description>
       <product>
           <property>aero/qbar-psf</property>
           <property>metrics/Sw-sqft</property>
           <property>metrics/cbarw-ft</property>
           <property>aero/ci2vel</property>
           <property>aero/alphadot-rad_sec</property>
           <table>
               <independentVar lookup="row">aero/alpha-deg-abs</independentVar>
               <tableData>
                   0   -1.30
                   5   -1.42
                   10  -1.58
                   15  -1.63
                   20  -1.59
                   25  -1.52
                   30  -1.32
                   35  -1.32
                   40  -1.32
                   45  -1.32
               </tableData>
           </table>
       </product>
    </function>

    <!-- Reference: ADA101648, page 27 -->
    <function name="aero/coefficient/CM/CMDA">
        <description>Pitch moment due to aileron position</description>
        <product>
          <property>aero/qbar-psf</property>
          <property>metrics/Sw-sqft</property>
          <property>metrics/cbarw-ft</property>
          <property>fcs/left-aileron-pos-rad</property>
          <table>
              <independentVar lookup="row">aero/alpha-deg-abs</independentVar>
              <tableData>
                  0   -0.00105
                  5   -0.00092
                  10  -0.00079
                  15  -0.00068
                  20  -0.00066
                  25  -0.00066
                  30  -0.00066
                  35  -0.00066
                  40  -0.00066
                  45  -0.00066
              </tableData>
          </table>
      </product>
  </function>

   <!-- Reference: ADA101648, page 27 -->
  <function name="aero/coefficient/CM/CMDSP">
      <description>Pitch moment due to spoiler position</description>
      <product>
          <property>aero/qbar-psf</property>
          <property>metrics/Sw-sqft</property>
          <property>metrics/cbarw-ft</property>
          <property>fcs/left-spoiler-pos-rad</property>
          <table>
              <independentVar lookup="row">aero/alpha-deg-abs</independentVar>
              <tableData>
                  0   0.000130
                  5   0.000079
                  10  0.000035
                  15  0.000007
                  20  0.000000
                  25  0.000000
                  30  0.000000
                  35  0.000000
                  40  0.000000
                  45  0.000000
              </tableData>
          </table>
      </product>
  </function>

  <!-- Reference: ADA101648, page 26 -->
    <function name="aero/coefficient/CM/DCM1">
        <description>delta pitch moment #1</description>
        <product>
             <property>aero/qbar-psf</property>
                <property>metrics/Sw-sqft</property>
                <property>metrics/cbarw-ft</property>
                <table>
                    <independentVar lookup="row">aero/alpha-deg-abs</independentVar>
                    <independentVar lookup="column">aero/beta-deg</independentVar>
                    <tableData>
                               0       5     10         15      20        25       30
                        0  0.000  -0.080   -0.0170   -0.0312  -0.0455  -0.0565  -0.0674
                        5  0.000  -0.080   -0.0170   -0.0312  -0.0455  -0.0565  -0.0674
                        10 0.000  -0.080   -0.0170   -0.0312  -0.0455  -0.0565  -0.0674
                        15 0.000  -0.138   -0.0235   -0.0450  -0.0705  -0.0888  -0.1071
                        20 0.000  -0.099   -0.0306   -0.0580  -0.0800  -0.1000  -0.1200
                        25 0.000   0.018   -0.0204   -0.0465  -0.0768  -0.0953  -0.1138
                        30 0.000   0.005   -0.0160   -0.0428  -0.0755  -0.0944  -0.1133
                        35 0.000   0.000    0.0000   -0.0025  -0.0087  -0.0106  -0.0125
                        40 0.000   0.000    0.0000    0.0000   0.0000   0.0000   0.0000
                        45 0.000   0.000    0.0000    0.0000   0.0000   0.0000   0.0000
                    </tableData>
                </table>
            </product>
        </function>

    <!-- Reference: ADA101648, page 26 -->
    <function name="aero/coefficient/CM/DCM2">
        <description>delta pitch moment #2</description>
        <product>
            <property>aero/qbar-psf</property>
            <property>metrics/Sw-sqft</property>
            <property>metrics/cbarw-ft</property>
            <table>
                <independentVar lookup="row">aero/alpha-deg-abs</independentVar>
                <independentVar lookup="column">aero/beta-deg</independentVar>
                <tableData>
                             0       5     10         15      20        25       30
                        0  0.000  0.080   0.0170   0.0312  0.0455  0.0565  0.0674
                        5  0.000  0.080   0.0170   0.0312  0.0455  0.0565  0.0674
                        10 0.000  0.080   0.0170   0.0312  0.0455  0.0565  0.0674
                        15 0.000  0.138   0.0235   0.0450  0.0705  0.0888  0.1071
                        20 0.000  0.099   0.0306   0.0580  0.0800  0.1000  0.1200
                        25 0.000   -0.018 0.0204   0.0465  0.0768  0.0953  0.1138
                        30 0.000   -0.005 0.0160   0.0428  0.0755  0.0944  0.1133
                        35 0.000   0.000  0.0000   0.0025  0.0087  0.0106  0.0125
                        40 0.000   0.000  0.0000   0.0000  0.0000  0.0000  0.0000
                        45 0.000   0.000  0.0000   0.0000  0.0000  0.0000  0.0000
                </tableData>
            </table>
        </product>
    </function>


     <function name="aero/coefficient/CN/CNB1">
       <description>Yaw moment due to beta</description>
       <product>
           <property>aero/qbar-psf</property>
           <property>metrics/Sw-sqft</property>
           <property>metrics/bw-ft</property>
           <property>aero/beta-deg</property>
           <table>
               <independentVar>aero/alpha-deg-abs</independentVar>
               <tableData>
                   0   0.0022
                   5   0.0022
                   10  0.0021
                   15  0.0013
                   20 -0.0006
                   25 -0.0033
                   30 -0.0040
                   35 -0.0038
                   40 -0.0026
                   45 -0.0020
               </tableData>
           </table>
       </product>
    </function>

    <function name="aero/coefficient/CN/CNB2">
       <description>Yaw moment due to beta</description>
       <product>
           <property>aero/qbar-psf</property>
           <property>metrics/Sw-sqft</property>
           <property>metrics/bw-ft</property>
           <property>aero/beta-rad</property>
           <table>
               <independentVar>aero/alpha-deg-abs</independentVar>
               <tableData>
                   0   0.0022
                   5   0.0022
                   10  0.0021
                   15  0.0013
                   20  0.0000
                   25 -0.0005
                   30 -0.0008
                   35 -0.0011
                   40 -0.0014
                   45 -0.0017
               </tableData>
           </table>
       </product>
    </function>

    <!-- Reference: ADA101648, page 27 -->
    <function name="aero/coefficient/CN/CNR">
       <description>Yaw moment due to yaw rate</description>
       <product>
           <property>aero/qbar-psf</property>
           <property>metrics/Sw-sqft</property>
           <property>metrics/bw-ft</property>
           <property>aero/bi2vel</property>
           <property>velocities/r-aero-rad_sec</property>
           <table>
               <independentVar lookup="row">aero/alpha-deg-abs</independentVar>
               <tableData>
                   0   -0.375
                   5   -0.361
                   10  -0.361
                   15  -0.370
                   20  -0.502
                   25  -0.660
                   30  -0.560
                   35  -0.372
                   40  -0.190
                   45   0.000
               </tableData>
           </table>
       </product>
    </function>

    <!-- Reference: ADA101648, page 27 -->
    <function name="aero/coefficient/CN/CNP">
        <description>Yaw moment due to roll rate</description>
        <product>
            <property>aero/qbar-psf</property>
            <property>metrics/Sw-sqft</property>
            <property>metrics/bw-ft</property>
            <property>aero/bi2vel</property>
            <property>velocities/p-aero-rad_sec</property>
            <table>
                <independentVar lookup="row">aero/alpha-deg-abs</independentVar>
                <tableData>
                    0     0.005
                    5     -0.014
                    10    0.007
                    15    0.023
                    20    -0.002
                    25    0.055
                    30    0.122
                    35    0.080
                    40    0.041
                    45    0.000
                </tableData>
            </table>
        </product>
    </function>

     <!-- Reference: ADA101648, page 27 -->
    <function name="aero/coefficient/CN/CNDA">
        <description>Yaw moment due to aileron position</description>
        <product>
            <property>aero/qbar-psf</property>
            <property>metrics/Sw-sqft</property>
            <property>metrics/bw-ft</property>
            <property>fcs/left-aileron-pos-norm</property>
            <table>
                <independentVar lookup="row">aero/alpha-deg-abs</independentVar>
                <tableData>
                    0   -0.000047
                    5   -0.000048
                    10  -0.000056
                    15  -0.000067
                    20  -0.000068
                    25  -0.000068
                    30  -0.000069
                    35  -0.000070
                    40  -0.000070
                    45  -0.000070
                </tableData>
            </table>
        </product>
    </function>

    <!-- Reference: ADA101648, page 27 -->
    <function name="aero/coefficient/CN/CNDR">
       <description>Yaw moment due to rudder position</description>
       <product>
           <property>aero/qbar-psf</property>
           <property>metrics/Sw-sqft</property>
           <property>metrics/bw-ft</property>
           <property>fcs/rudder-pos-norm</property>
           <table>
               <independentVar lookup="row">aero/alpha-deg-abs</independentVar>
               <tableData>
                   0   -0.00090
                   5   -0.00086
                   10  -0.00078
                   15  -0.00073
                   20  -0.00065
                   25  -0.00050
                   30  -0.00032
                   35  -0.00023
                   40  -0.00014
                   45  -0.00000
               </tableData>
           </table>
       </product>
    </function>

    <!-- Reference: ADA101648, page 27 -->
    <function name="aero/coefficient/CN/CNDSP">
        <product>
            <property>aero/qbar-psf</property>
            <property>metrics/Sw-sqft</property>
            <property>metrics/bw-ft</property>
            <property>fcs/left-spoiler-pos-norm</property>
            <table>
                <independentVar lookup="row">aero/alpha-deg-abs</independentVar>
                <tableData>
                    0    0.0000532
                    5    0.0000433
                    10   0.0000288
                    15   0.0000132
                    20   0.0000090
                    25   0.0000044
                    30   0.0000009
                    35   0.0000000
                    40   0.0000000
                    45   0.0000000
                </tableData>
            </table>
        </product>
    </function>


   <!-- Implements the Lift equations using the tables above -->
  <axis name="LIFT">

    <function name="aero/lift/Alpha_N_180to110">
        <description>Lift at alpha between -180 to -110</description>
        <product>
        <ifthen>
            <ge> <p> aero/alpha-deg-abs </p> <v> -180.00 </v> </ge>
            <v> 1.00 </v>
            <v> 0.00 </v>
        </ifthen>

         <ifthen>
            <lt> <p> aero/alpha-deg-abs </p> <v> -110.00 </v> </lt>
            <v> 1.00 </v>
            <v> 0.00 </v>
        </ifthen>

        <sum>
            <v>0.122</v>
                <product>
                    <v>0.00300</v>
                    <property>fcs/elevator-pos-norm</property>
                </product>
        </sum>
    </product>


    </function>

    <function name="aero/lift/Alpha_N_110to0">
        <description>Lift from -110 to 0 degrees AoA</description>
        <product>
            <ifthen>
                <ge>
                    <p>aero/alpha-deg-abs</p>
                    <v> -110.0 </v>
                </ge>
                <v> 1.00 </v>
                <v> 0.00 </v>
            </ifthen>
            <ifthen>
                <lt>
                    <p>aero/alpha-deg-abs</p>
                    <v> 0.00 </v>
                </lt>
                <v> 1.00 </v>
                <v> 0.00 </v>
            </ifthen>

            <sum>
                <difference>
                    <v>0.244</v> <!-- CL_BASIC at 0 AoA -->
                    <property>aero/coefficient/CL/CL_BASIC</property>
                </difference>
                <property>aero/coefficient/CL/CL_STAB</property>
            </sum>

        </product>
    </function>

   <function name="aero/lift/Alpha_0to110">
     <description>Lift from 0 to 110 degrees Alpha</description>
       <product>
              <!-- If Alpha greater than or equal to 0 -->
          <ifthen>
              <ge>
                  <p>aero/alpha-deg-abs</p>
                  <v> 0.00 </v>
              </ge>
              <v> 1.00 </v>
              <v> 0.00 </v>
          </ifthen>
          <!-- and less than 110 -->
          <ifthen>
              <lt>
                  <p>aero/alpha-deg-abs</p>
                  <v> 110.0 </v>
              </lt>
              <v> 1.00 </v>
              <v> 0.00 </v>
          </ifthen>

      <sum>
          <property>aero/coefficient/CL/CL_BASIC</property>
          <property>aero/coefficient/CL/CL_STAB</property>
      </sum>
     </product>
    </function>

   <function name="aero/lift/Alpha110to180">
       <description>Lift from 110 to 180 degrees Alpha</description>
       <product>
           <ifthen>
              <ge>
                  <p>aero/alpha-deg-abs</p>
                  <v> 110.00 </v>
              </ge>
              <v> 1.00 </v>
              <v> 0.00 </v>
          </ifthen>

          <ifthen>
              <lt>
                  <p>aero/alpha-deg-abs</p>
                  <v> 180.0 </v>
              </lt>
              <v> 1.00 </v>
              <v> 0.00 </v>
          </ifthen>

          <sum>
              <v>-0.547</v> <!-- CL_BASIC @ 110 AoA -->
              <product>
                  <v>0.00300</v> <!-- CL_STAB @ 110 AoA -->
                  <p>fcs/elevator-pos-norm</p>
              </product>
          </sum>

      </product>
  </function>

  </axis>

  <axis name="DRAG">

      <function name="aero/drag/drag_ABS_110">
          <description>Drag at absolute value of alpha less than 110 AoA</description>
          <product>
              <ifthen>
                  <lt>
                      <p>aero/alpha-deg-abs</p>
                      <v>110</v>
                  </lt>
                  <v> 1.00 </v>
                  <v> 0.00 </v>
              </ifthen>
              <sum>
                  <property>aero/coefficient/CD/CD_BASIC</property>
                  <v> 0.0037 </v> <!-- delta CD -->
              </sum>
          </product>
          </function>

          <function name="aero/drag/drag_ABS_110_180">
              <description>Drag at ABS AoA between 110 and 180 AoA</description>
              <product>
                  <ifthen>
                      <ge>
                          <property>aero/alpha-deg-abs</property>
                          <v> 110 </v>
                      </ge>
                      <v> 1.00 </v>
                      <v> 0.00 </v>
                  </ifthen>

                  <ifthen>
                      <le>
                          <property>aero/alpha-deg-abs</property>
                          <v> 180 </v>
                      </le>
                      <v> 1.00 </v>
                      <v> 0.00 </v>
                  </ifthen>

                  <sum>
                      <v>1.567</v>
                      <v>0.0037</v> <!-- delta CD -->
                  </sum>
              </product>
            </function>
        </axis>

  <axis name="SIDE">
    <function name="aero/side/ABS_ALPHA_45">
          <description>Sideforce at less than absolute value Alpha 45</description>
          <product>
              <ifthen>
                  <le> <p> aero/alpha-deg-abs </p> <v> 45.0 </v> </le>
                  <v> 1.00 </v>
                  <v> 0.00 </v>
              </ifthen>
          <sum>
                <product>
                    <property>aero/coefficient/CY/CYB</property>
                    <property>aero/beta-deg</property>
                </product>

                <product>
                  <p> aero/coefficient/CY/CYDA </p>
                  <p> fcs/right-aileron-pos-norm </p>
                </product>

                <product>
                  <p> aero/coefficient/CY/CYDSP </p>
                  <p> fcs/right-aileron-pos-norm </p>
                </product>

                <product>
                  <p> aero/coefficient/CY/CYDR </p>
                  <p> fcs/rudder-pos-norm </p>
                </product>
          </sum>
        </product>
    </function>

    <function name="aero/side/ABS_ALPHA_45_110">
      <description>sideforce at greater than 45 AoA, but less than 110 AoA </description>
        <product>
          <ifthen>
              <ge> <p> aero/alpha-deg-abs </p> <v> 45 </v> </ge>
              <v> 1.00 </v>
              <v> 0.00 </v>
          </ifthen>

          <ifthen>
            <le> <p> aero/alpha-deg-abs </p> <v> 110 </v> </le>
            <v> 1.00 </v>
            <v> 0.00 </v>
          </ifthen>
            <sum>
                <product>
                    <property>aero/coefficient/CY/CYB</property>
                    <property>aero/beta-deg</property>
                </product>
                <product>
                  <p> aero/coefficient/CY/CYDA </p>
                  <p> fcs/right-aileron-pos-norm </p>
                </product>

                <product>
                  <p> aero/coefficient/CY/CYDSP </p>
                  <p> fcs/right-aileron-pos-norm </p>
                </product>
              </sum>
          </product>
    </function>

    <function name="aero/side/ABS_ALPHA_110_180">
      <description> sideforce at greater than ABS 110 AoA, less than 180 ABS AoA </description>
      <product>
        <ifthen>
          <ge> <p> aero/alpha-deg-abs </p> <v> 110 </v> </ge>
          <v> 1.00 </v>
          <v> 0.00 </v>
        </ifthen>

        <ifthen>
          <le> <p> aero/alpha-deg-abs </p> <v> 180 </v> </le>
          <v> 1.00 </v>
          <v> 0.00 </v>
        </ifthen>

        <sum>
          <product>
            <v> 0.0030 </v>
            <p> aero/beta-deg </p>
          </product>

          <product>
            <p> aero/coefficient/CY/CYDA </p>
            <p> fcs/right-aileron-pos-norm </p>
          </product>

          <product>
            <p> aero/coefficient/CY/CYDSP </p>
            <p> fcs/right-aileron-pos-norm </p>
          </product>

        </sum>
    </product>
    </function>


  </axis>

  <axis name="ROLL">
    <function name="aero/roll/ABS_ALPHA_45">
      <description> roll less than or equal to ABS 45 AoA </description>
      <product>
      <ifthen>
          <le> <p> aero/alpha-deg-abs </p> <v> 45 </v> </le>
          <v> 1.00 </v>
          <v> 0.00 </v>
      </ifthen>

      <sum>
        <product>
          <p> aero/coefficient/CR/CRB1 </p>
          <p> aero/beta-deg </p>
        </product>
        <p> aero/coefficient/CR/CRP1 </p>
        <p> aero/coefficient/CR/CRR </p>
        <p> aero/coefficient/CR/CRDA </p>
        <p> aero/coefficient/CR/CRDSP </p>
        <p> aero/coefficient/CR/CRDR </p>
      </sum>
    </product>
    </function>

    <function name="aero/roll/ABS_ALPHA_45_110">
      <description> 45 to 110 ABS AoA</description>
      <product>
        <ifthen>
          <ge> <p> aero/alpha-deg-abs </p> <v> 45 </v> </ge>
          <v> 1.00 </v>
          <v> 0.00 </v>
        </ifthen>

        <ifthen>
          <le> <p> aero/alpha-deg-abs </p> <v> 110 </v> </le>
          <v> 1.00 </v>
          <v> 0.00 </v>
        </ifthen>

        <sum>
          <product>
            <p> aero/coefficient/CR/CRB1 </p>
            <p> aero/beta-deg </p>
          </product>

          <product>
            <v> -0.100 </v>
            <property>aero/qbar-psf</property>
            <property>metrics/Sw-sqft</property>
            <property>metrics/bw-ft</property>
            <property>aero/bi2vel</property>
            <property>velocities/p-aero-rad_sec</property>
          </product>

          <product>
              <v> 0.050 </v>
              <property>aero/qbar-psf</property>
              <property>metrics/Sw-sqft</property>
              <property>metrics/bw-ft</property>
              <property>aero/bi2vel</property>
              <property>velocities/r-aero-rad_sec</property>
          </product>
      </sum>

      </product>
      </function>

    <function name="aero/roll/ABS_ALPHA_110_180">
      <description> from 110 to 180 ABS AoA </description>
      <product>
          <ifthen>
            <ge> <p> aero/alpha-deg-abs </p> <v> 110 </v> </ge>
            <v> 1.00 </v>
            <v> 0.00 </v>
          </ifthen>

          <ifthen>
            <le> <p> aero/alpha-deg-abs </p> <v> 180 </v> </le>
            <v> 1.00 </v>
            <v> 0.00 </v>
          </ifthen>

          <sum>
            <product>
              <v> -0.00300 </v>
              <p> aero/beta-deg </p>
            </product>
            <product>
              <v> -0.100 </v>
              <property>aero/qbar-psf</property>
              <property>metrics/Sw-sqft</property>
              <property>metrics/bw-ft</property>
              <property>aero/bi2vel</property>
              <property>velocities/p-aero-rad_sec</property>
            </product>
            <product>
                <v> 0.050 </v>
                <property>aero/qbar-psf</property>
                <property>metrics/Sw-sqft</property>
                <property>metrics/bw-ft</property>
                <property>aero/bi2vel</property>
                <property>velocities/r-aero-rad_sec</property>
            </product>
          </sum>
        </product>
      </function>

  </axis>

  <axis name="PITCH">
    <function name="aero/pitch/ABS_ALPHA_45">
      <description> 0 to 45 ABS AoA </description>
      <product>
        <ifthen>
          <le> <p> aero/alpha-deg-abs </p> <v> 45 </v> </le>
          <v> 1.00 </v>
          <v> 0.00 </v>
        </ifthen>

        <sum>
          <p> aero/coefficient/CM/CM_BASIC </p>
          <p> aero/coefficient/CM/CM_STAB </p>
          <p> aero/coefficient/CM/CMDA </p>
          <p> aero/coefficient/CM/CMDSP </p>
          <p> aero/coefficient/CM/CMAD </p>
          <p> aero/coefficient/CM/CMQ </p>
        </sum>

      </product>
    </function>
  </axis>

  <axis name="YAW">
    <function name="aero/yaw/ABS_ALPHA_45">
      <description> up to 45 AoA </description>
      <product>
        <ifthen>
          <le> <p> aero/alpha-deg-abs </p> <v> 45 </v> </le>
          <v> 1.00 </v>
          <v> 0.00 </v>
        </ifthen>

        <sum>
          <p> aero/coefficient/CN/CNB1 </p>
          <p> aero/coefficient/CN/CNP </p>
          <p> aero/coefficient/CN/CNR </p>
          <p> aero/coefficient/CN/CNDA </p>
          <p> aero/coefficient/CN/CNDR </p>
          <p> aero/coefficient/CN/CNDSP </p>
        </sum>
      </product>
    </function>

  </axis>

 </aerodynamics>

 <external_reactions>
 </external_reactions>

</fdm_config>
